<?xml version="1.0"?>
    <flight_control name="c172">
        <channel name="Pitch">
            <summer name="fcs/pitch-trim-sum">
                <input>ap/elevator_cmd</input>
                <input>fcs/elevator-cmd-norm</input>
                <input>fcs/pitch-trim-cmd-norm</input>
                <clipto>
                    <min>-1</min>
                    <max> 1</max>
                </clipto>
            </summer>

            <!--
            Map the -1 to +1 input into the range specified below, then
            multiply by 0.01745 to convert to radians
            -->
            <aerosurface_scale name="fcs/elevator-control">
                <input>fcs/pitch-trim-sum</input>
                <range>
                    <min>-28</min>
                    <max> 23</max>
                </range>
                <gain>0.01745</gain>
            </aerosurface_scale>

            <actuator name="fcs/elevator-actuator">
              <input> fcs/elevator-control </input>
              <lag> 60 </lag>
              <bias> 0.002 </bias>
              <hysteresis_width> 0.05 </hysteresis_width>
              <clipto>
                <!-- +/- 20 degrees -->
                <min> -0.34 </min>
                <max>  0.34 </max>
              </clipto>
              <output>fcs/elevator-pos-rad</output>
            </actuator>

        </channel>

        <channel name="Roll">

            <summer name="fcs/roll-trim-sum">
                <input>ap/aileron_cmd</input>
                <input>ap/roll-cmd-norm-output</input>
                <input>fcs/aileron-cmd-norm</input>
                <input>fcs/roll-trim-cmd-norm</input>
                <clipto>
                    <min>-1</min>
                    <max>1</max>
                </clipto>
            </summer>

            <aerosurface_scale name="fcs/left-aileron-control">
              <description> The output from this control is in radians. </description>
              <input>fcs/roll-trim-sum</input>
              <gain>0.01745</gain>
              <range>
                <min>-20</min>
                <max> 15</max>
              </range>
            </aerosurface_scale>

            <actuator name="fcs/left-aileron-actuator">
              <description> The input to this actuator is in radians. </description>
              <input> fcs/left-aileron-control </input>
              <rate_limit> 1.57 </rate_limit>
              <hysteresis_width> 0.005 </hysteresis_width>
              <clipto>
                <min> -0.350 </min>
                <max>  0.260 </max>
              </clipto>
              <output>fcs/left-aileron-pos-rad</output>
            </actuator>

            <aerosurface_scale name="fcs/right-aileron-control">
              <description> The output from this control is in radians. </description>
              <input>-fcs/roll-trim-sum</input>
              <gain>0.01745</gain>
              <range>
                <min>-20</min>
                <max> 15</max>
              </range>
            </aerosurface_scale>

            <actuator name="fcs/right-aileron-actuator">
              <description> The input to this actuator is in radians. </description>
              <input> fcs/right-aileron-control </input>
              <rate_limit> 1.57 </rate_limit>
              <hysteresis_width> 0.005 </hysteresis_width>
              <clipto>
                <min> -0.350 </min>
                <max>  0.260 </max>
              </clipto>
              <output>fcs/right-aileron-pos-rad</output>
            </actuator>

            <summer name="fcs/delta-aileron-pos">
              <input> fcs/left-aileron-pos-rad </input>
              <input> -fcs/right-aileron-pos-rad </input>
            </summer>

            <pure_gain name="fcs/effective-aileron-pos">
                <input>fcs/delta-aileron-pos</input>
                <gain> 0.5 </gain>
            </pure_gain>

        </channel>

        <channel name="Yaw">
            <summer name="fcs/yaw-trim-sum">
                <input>fcs/rudder-cmd-norm</input>
                <input>fcs/yaw-trim-cmd-norm</input>
                <clipto>
                    <min>-1</min>
                    <max>1</max>
                </clipto>
            </summer>
            <aerosurface_scale name="fcs/rudder-control">
                <input>fcs/yaw-trim-sum</input>
                <gain>0.01745</gain>
                <range>
                    <min>-16</min>
                    <max> 16</max>
                </range>
                <output>fcs/rudder-pos-rad</output>
            </aerosurface_scale>
        </channel>

        <!-- Nosewheel steering linked to rudder pedals (real C172 has mechanical linkage) -->
        <channel name="Steering">
            <pure_gain name="fcs/steer-gain">
                <input>fcs/yaw-trim-sum</input>
                <gain>-1.0</gain>
                <output>fcs/steer-cmd-norm</output>
            </pure_gain>
        </channel>

        <channel name="Flaps">
            <kinematic name="fcs/flaps-control">
                <input>fcs/flap-cmd-norm</input>
                <traverse>
                    <setting>
                       <position> 0 </position>
                       <time> 0 </time>
                    </setting>
                    <setting>
                       <position> 10 </position>
                       <time> 2 </time>
                    </setting>
                    <setting>
                       <position> 20 </position>
                       <time> 1 </time>
                    </setting>
                    <setting>
                       <position> 30 </position>
                       <time> 1 </time>
                    </setting>
                </traverse>
                <output>fcs/flap-pos-deg</output>
            </kinematic>
            <aerosurface_scale name="fcs/flap-position-normalizer">
              <input>fcs/flap-pos-deg</input>
              <domain>
                <min>0</min>  <!-- Flaps actual minimum position -->
                <max>30</max>  <!-- Flaps actual maximum position -->
              </domain>
              <range>
                <min>0</min>  <!-- Flaps normalized minimum position -->
                <max>1</max>  <!-- Flaps normalized maximum position -->
              </range>
              <output>fcs/flap-pos-norm</output>
            </aerosurface_scale>
        </channel>
    </flight_control>
