<?xml version="1.0"?>
<!-- Swan K1 propeller: 9x6 (9-inch diameter, 6-inch pitch) -->
<!-- C_THRUST / C_POWER derived from APC 9x6E propeller data -->
<propeller name="SwanK1_Prop_9x6" version="1.1">
  <ixx unit="KG*M2"> 7.50e-05 </ixx>   <!-- (1/12)*14e-3*(9*0.0254)^2 -->
  <diameter unit="IN"> 9.0 </diameter>
  <numblades> 2 </numblades>
  <constspeed> 0 </constspeed>

  <!-- C_THRUST table: J (advance ratio) vs CT -->
  <!-- Based on APC 9x6E data from UIUC propeller database -->
  <table name="C_THRUST" type="internal">
    <tableData>
      0.0000   0.1350
      0.0300   0.1320
      0.0600   0.1280
      0.0900   0.1240
      0.1200   0.1195
      0.1500   0.1148
      0.1800   0.1098
      0.2100   0.1045
      0.2400   0.0990
      0.2700   0.0933
      0.3000   0.0874
      0.3300   0.0813
      0.3600   0.0750
      0.3900   0.0685
      0.4200   0.0619
      0.4500   0.0551
      0.4800   0.0481
      0.5100   0.0410
      0.5400   0.0337
      0.5700   0.0263
      0.6000   0.0187
      0.6300   0.0110
      0.6600   0.0031
      0.6800  -0.0020
    </tableData>
  </table>

  <!-- C_POWER table: J (advance ratio) vs CP. UIUC apce_9x6 wind-tunnel data (static run rd0987; run rd0992 at 6015 rpm for J 0.45-0.83), linear between. The torque/thrust ratio this sets subtracts from the 0.0705 m cant lever in cruise, so it has to be the measured value -->
  <table name="C_POWER" type="internal">
    <tableData>
      0.0000   0.0515
      0.0300   0.0512
      0.0600   0.0509
      0.0900   0.0506
      0.1200   0.0504
      0.1500   0.0501
      0.1800   0.0498
      0.2100   0.0495
      0.2400   0.0492
      0.2700   0.0489
      0.3000   0.0486
      0.3300   0.0484
      0.3600   0.0481
      0.3900   0.0478
      0.4200   0.0475
      0.4500   0.0472
      0.4800   0.0439
      0.5100   0.0409
      0.5400   0.0379
      0.5700   0.0350
      0.6000   0.0321
      0.6300   0.0294
      0.6600   0.0265
      0.6800   0.0246
    </tableData>
  </table>

</propeller>
