<?xml version="1.0"?>
<fdm_config name="quadtailsitter" version="2.0" release="ALPHA">
  <metrics file="Metrics.xml"/>
  <mass_balance file="Mass.xml"/>
  <aerodynamics file="Aero.xml"/>
  <ground_reactions file="Gear.xml"/>
  <propulsion file="Propulsion.xml"/>
</fdm_config>
